New "Transformer.reg1a" phases=3 windings=2 buses=[150.1.2.3.0,  150r] conns=[wye, wye] kVs=[4.16, 4.16] kVAs=[5000.0, 5000.0] taps=[1.0, 1.0375] %Rs=[5e-06, 5e-06] normamps=763.323673207438 emergamps=1040.89591801014 normhkVA=5500 emerghkVA=7500 RdcOhms=4.90325333333333e-08 XHL=0.001 %loadloss=1e-05 Xscarray=[0.001]
New "Transformer.xfm1" phases=3 windings=2 buses=[61s,  610.1.2.3.0] conns=[delta, delta] kVs=[4.16, 0.48] kVAs=[150.0, 150.0] taps=[1.0, 1.0] %Rs=[0.635, 0.635] normamps=22.8997101962231 emergamps=31.2268775403043 normhkVA=165 emerghkVA=225 RdcOhms=0.00829056 XHL=2.72 %loadloss=1.27 Xscarray=[2.72]
New "Transformer.reg2a" phases=1 windings=2 buses=[9.1,  9r.1] conns=[wye, wye] kVs=[2.402, 2.402] kVAs=[2000.0, 2000.0] taps=[1.0, 1.0] %Rs=[5e-06, 5e-06] normamps=915.903413821815 emergamps=1248.95920066611 normhkVA=2200 emerghkVA=3000 RdcOhms=1.22604085e-07 XHL=0.01 %loadloss=1e-05 Xscarray=[0.01]
New "Transformer.reg3a" phases=1 windings=2 buses=[25.1,  25r.1] conns=[wye, wye] kVs=[2.402, 2.402] kVAs=[2000.0, 2000.0] taps=[1.0, 1.0125] %Rs=[5e-06, 5e-06] normamps=915.903413821815 emergamps=1248.95920066611 normhkVA=2200 emerghkVA=3000 RdcOhms=1.22604085e-07 XHL=0.01 %loadloss=1e-05 Xscarray=[0.01]
New "Transformer.reg4a" phases=1 windings=2 buses=[160.1,  160r.1] conns=[wye, wye] kVs=[2.402, 2.402] kVAs=[2000.0, 2000.0] taps=[1.0, 1.0625] %Rs=[5e-06, 5e-06] normamps=915.903413821815 emergamps=1248.95920066611 normhkVA=2200 emerghkVA=3000 RdcOhms=1.22604085e-07 XHL=0.01 %loadloss=1e-05 Xscarray=[0.01]
New "Transformer.reg3c" phases=1 windings=2 buses=[25.3,  25r.3] conns=[wye, wye] kVs=[2.402, 2.402] kVAs=[2000.0, 2000.0] taps=[1.0, 1.0] %Rs=[5e-06, 5e-06] normamps=915.903413821815 emergamps=1248.95920066611 normhkVA=2200 emerghkVA=3000 RdcOhms=1.22604085e-07 XHL=0.01 %loadloss=1e-05 Xscarray=[0.01]
New "Transformer.reg4b" phases=1 windings=2 buses=[160.2,  160r.2] conns=[wye, wye] kVs=[2.402, 2.402] kVAs=[2000.0, 2000.0] taps=[1.0, 1.025] %Rs=[5e-06, 5e-06] normamps=915.903413821815 emergamps=1248.95920066611 normhkVA=2200 emerghkVA=3000 RdcOhms=1.22604085e-07 XHL=0.01 %loadloss=1e-05 Xscarray=[0.01]
New "Transformer.reg4c" phases=1 windings=2 buses=[160.3,  160r.3] conns=[wye, wye] kVs=[2.402, 2.402] kVAs=[2000.0, 2000.0] taps=[1.0, 1.0375] %Rs=[5e-06, 5e-06] normamps=915.903413821815 emergamps=1248.95920066611 normhkVA=2200 emerghkVA=3000 RdcOhms=1.22604085e-07 XHL=0.01 %loadloss=1e-05 Xscarray=[0.01]
