New "Capacitor.cap1" bus1=675.1.2.3.0 bus2=675.1.2.3.0.0.0 phases=3 kvar=[600.0] kv=4.16 conn=wye cmatrix=[0 |1.87639338887875E-310 2.25607960651843E-308 |9.21786364221574E-306 0 9.21786786141778E-306] cuf=[91.9673] Numsteps=1 states=[1.0] normamps=112.416759145095 emergamps=149.889012193461 faultrate=0.0005 pctperm=100 repair=3 basefreq=60 enabled=Yes
New "Capacitor.cap2" bus1=611.3 bus2=611.0.0.0 phases=1 kvar=[100.0] kv=2.4 conn=wye cuf=[46.0518] Numsteps=1 states=[1.0] normamps=56.25 emergamps=75.0 faultrate=0.0005 pctperm=100 repair=3 basefreq=60 enabled=Yes
