New "Transformer.sub" phases=3 windings=2 wdg=2 bus=650 conn=wye kV=4.16 kVA=5000 tap=1.0 %R=0.0005 buses=[sourcebus, 650.0] conns=[delta, wye] kVs=[115.0, 4.16] kVAs=[5000.0, 5000.0] taps=[1.0, 1.0] XHL=0.008 XHT=4 XLT=4 Xscarray=[0.008] thermal=2 n=0.8 m=0.8 flrise=65 hsrise=15 %loadloss=0.001 normhkVA=5500.0 emerghkVA=7500 MaxTap=1.1 MinTap=0.9 NumTaps=32 ppm_antifloat=1 %Rs=[0.0005, 0.0005] X12=0.008 X13=4 X23=4 LeadLag=Lag RdcOhms=4.90325333333333e-06 Seasons=1 Ratings=[1100.0] normamps=27.6124041786343 emergamps=37.6532784254104 faultrate=0.007 basefreq=60 enabled=Yes
New "Transformer.reg1" phases=1 windings=2 wdg=2 bus=rg60.1 conn=wye kV=2.4 kVA=1666 tap=1.05625 %R=0.005 buses=[650.1, rg60.1] conns=[wye, wye] kVs=[2.4, 2.4] kVAs=[1666.0, 1666.0] taps=[1.0, 1.05625] XHL=0.01 XHT=35 XLT=30 Xscarray=[0.01] thermal=2 n=0.8 m=0.8 flrise=65 hsrise=15 %loadloss=0.01 normhkVA=1832.6 emerghkVA=2499 MaxTap=1.1 MinTap=0.9 NumTaps=32 ppm_antifloat=1 %Rs=[0.005, 0.005] X12=0.01 X13=35 X23=30 LeadLag=Lag RdcOhms=0.000146938775510204 Seasons=1 Ratings=[1100.0] normamps=763.583333333333 emergamps=1041.25 faultrate=0.007 basefreq=60 enabled=Yes
New "Transformer.reg2" phases=1 windings=2 wdg=2 bus=rg60.2 conn=wye kV=2.4 kVA=1666 tap=1.0375 %R=0.005 buses=[650.2, rg60.2] conns=[wye, wye] kVs=[2.4, 2.4] kVAs=[1666.0, 1666.0] taps=[1.0, 1.0375] XHL=0.01 XHT=35 XLT=30 Xscarray=[0.01] thermal=2 n=0.8 m=0.8 flrise=65 hsrise=15 %loadloss=0.01 normhkVA=1832.6 emerghkVA=2499 MaxTap=1.1 MinTap=0.9 NumTaps=32 ppm_antifloat=1 %Rs=[0.005, 0.005] X12=0.01 X13=35 X23=30 LeadLag=Lag RdcOhms=0.000146938775510204 Seasons=1 Ratings=[1100.0] normamps=763.583333333333 emergamps=1041.25 faultrate=0.007 basefreq=60 enabled=Yes
New "Transformer.reg3" phases=1 windings=2 wdg=2 bus=rg60.3 conn=wye kV=2.4 kVA=1666 tap=1.05625 %R=0.005 buses=[650.3, rg60.3] conns=[wye, wye] kVs=[2.4, 2.4] kVAs=[1666.0, 1666.0] taps=[1.0, 1.05625] XHL=0.01 XHT=35 XLT=30 Xscarray=[0.01] thermal=2 n=0.8 m=0.8 flrise=65 hsrise=15 %loadloss=0.01 normhkVA=1832.6 emerghkVA=2499 MaxTap=1.1 MinTap=0.9 NumTaps=32 ppm_antifloat=1 %Rs=[0.005, 0.005] X12=0.01 X13=35 X23=30 LeadLag=Lag RdcOhms=0.000146938775510204 Seasons=1 Ratings=[1100.0] normamps=763.583333333333 emergamps=1041.25 faultrate=0.007 basefreq=60 enabled=Yes
New "Transformer.xfm1" phases=3 windings=2 wdg=2 bus=634 conn=wye kV=0.48 kVA=500 tap=1.0 %R=0.55 buses=[633.0, 634.0] conns=[wye, wye] kVs=[4.16, 0.48] kVAs=[500.0, 500.0] taps=[1.0, 1.0] XHL=2.0 XHT=1 XLT=1 Xscarray=[2.0] thermal=2 n=0.8 m=0.8 flrise=65 hsrise=15 %loadloss=1.1 normhkVA=550.0 emerghkVA=750 MaxTap=1.1 MinTap=0.9 NumTaps=32 ppm_antifloat=1 %Rs=[0.55, 0.55] X12=2.0 X13=1 X23=1 LeadLag=Lag RdcOhms=0.00071808 Seasons=1 Ratings=[1100.0] normamps=76.3323673207438 emergamps=104.089591801014 faultrate=0.007 basefreq=60 enabled=Yes
