Edit "Vsource.source" Isc1=105429.179591149 Isc3=100408.742467761 MVAsc1=21000 MVAsc3=20000 Model=Thevenin R0=0.179603583012336 R1=0.160376682055275 ScanType=Positive Sequence=Positive X0=0.538810749037007 X1=0.641506728221101 Z0=[0.179603583012336, 0.538810749037007] Z1=[0.160376682055275, 0.641506728221101] Z2=[0.160376682055275, 0.641506728221101] angle=30 baseMVA=100 basefreq=60 basekv=115 bus1=sourcebus bus2=sourcebus.0.0.0 enabled=Yes frequency=60 phases=3 pu=1.0001 puZ0=[0.0013580611191859, 0.00407418335755771] puZ1=[0.00121267812518166, 0.00485071250072666] puZ2=[0.00121267812518166, 0.00485071250072666] puZideal=[1e-06, 0.001] spectrum=defaultvsource x0r0=3 x1r1=4
